Fri Apr  2 20:56:41 EDT 2021
$PROBLEM    OS model
;@ Variables 35/20 @;
$INPUT      ID ; unique patient identifier
            TIME ; time in days
            DV ;
            EVID ;
            BSLD ; Observed baseline SLD
            IBAS3 IEC53 ; EBEs from final sVEGFR-3 model (Base,AUC50)
            IBASS IKG ILAM ; EBEs from final SLD model (SLD0,KG,Lambda)
$DATA      input_data_debug.csv IGNORE=#
$SUBROUTINE ADVAN6 TOL=6
$MODEL      NCOMP=3
$THETA  (0,7.09) ; Beta0_OS
$THETA  (0,0.298) ; Gamma_OS
$THETA  0.0115 ; Beta_SLD
$OMEGA  0  FIX  ;      dummy
$OMEGA  0  FIX  ;     dummy_
$PK
;=========== sVEGFR-3 ================
EMAX    =         1                    ; Imax
BASE3   =         IBAS3                ; Base_sVEGFR3
MRT3    =         5.76                 ; MRT_sVEGFR3
EC503   =         IEC53                ; AUC50_sVEGFR3
KOUT3   =         1/MRT3               ; kout_sVEGFR3
KIN3    =         BASE3*KOUT3          ; Rin_sVEGFR3
EFF3    =         EMAX*440/(EC503+440) ; Emax model

;=========== SLD =====================
IBASE   =        IBASS                ; SLD0
KG      =        IKG                  ; KG
LAMBDA  =        ILAM                 ; Lambda
KD3     =        174/7/1000           ; K_sVEGFR3

;=========== SURVIVAL ================
B0H     =        THETA(1)+ETA(1)      ; Beta0_OS, with dummy ETA
GAMH    =        THETA(2)             ; Gamma_OS

;===== Compartment initialization ====
A_0(1)  =        BASE3
A_0(2)  =        IBASE

$DES
;=========== sVEGFR-3 and SLD ========
DADT(1) =   KIN3*(1-EFF3)-KOUT3*A(1)  ; sVEGFR-3
CFBV3   =   ((A(1)-BASE3)/BASE3)      ; relative change in sVEGFR-3 from baseline
DADT(2) =   KG*A(2)-(-CFBV3*KD3)*EXP(-(LAMBDA*T))*A(2) ; SLD

;=========== Time-to-event models ====
PSIH    = EXP(-B0H)      ; Psi_OS
DADT(3) = PSIH**(1/GAMH)*T**(1/GAMH-1)/(GAMH*(1+(PSIH*T)**(1/GAMH)))*EXP(THETA(3)*A(2)) ; hazard OS

$ERROR
REPI = IREP
VEGFR = A(1)
TUM     = A(2)
CHZ     = A(3)           ; cumulative hazard for survival

SUR     = EXP(-CHZ)      ; survival probability

PSIHX   = EXP(-B0H)      ; Psi_OS

IF(TUM.GT.838) TUM=838
HAZNOW  = PSIHX**(1/GAMH)*TIME**(1/GAMH-1)/(GAMH*(1+(PSIHX*TIME)**(1/GAMH)))*EXP(THETA(3)*TUM) ; hazard OS

IF(EVID.EQ.0.AND.DV.EQ.0) Y = SUR          ; probability of surviving until time=TIME
IF(EVID.EQ.0.AND.DV.EQ.1) Y = SUR*HAZNOW   ; probability of event at time=TIME

$ESTIMATION MAXEVAL=9999 METHOD=1 LAPLACIAN LIKE NUMERICAL SLOW
            NOABORT
$COVARIANCE MATRIX=R
;@ Pred Variables 10/20 @;
$TABLE      ID TIME VEGFR TUM DV BSLD IBAS3 IEC53 IBASS IKG ILAM CHZ
            ONEHEADER NOPRINT FORMAT=s1PE13.6 FILE=simvpcdata_debug.csv

NM-TRAN MESSAGES
 WARNINGS AND ERRORS (IF ANY) FOR PROBLEM    1
 (WARNING  2) NM-TRAN INFERS THAT THE DATA ARE POPULATION.
 (WARNING  3) THERE MAY BE AN ERROR IN THE ABBREVIATED CODE. THE FOLLOWING
 ONE OR MORE RANDOM VARIABLES ARE DEFINED WITH "IF" STATEMENTS THAT DO NOT
 PROVIDE DEFINITIONS FOR BOTH THE "THEN" AND "ELSE" CASES. IF ALL
 CONDITIONS FAIL, THE VALUES OF THESE VARIABLES WILL BE ZERO.
   Y
 (WARNING  97) A RANDOM QUANTITY IS RAISED TO A POWER. IF THE RESULT AFFECTS
 THE VALUE OF THE OBJECTIVE FUNCTION, THE USER SHOULD ENSURE THAT THE
 RANDOM QUANTITY IS NEVER 0 WHEN THE POWER IS < 1.

1NONLINEAR MIXED EFFECTS MODEL PROGRAM (NONMEM) VERSION 7.4.4
 ORIGINALLY DEVELOPED BY STUART BEAL, LEWIS SHEINER, AND ALISON BOECKMANN
 CURRENT DEVELOPERS ARE ROBERT BAUER, ICON DEVELOPMENT SOLUTIONS,
 AND ALISON BOECKMANN. IMPLEMENTATION, EFFICIENCY, AND STANDARDIZATION
 PERFORMED BY NOUS INFOSYSTEMS.
 PROBLEM NO.:         1
 OS model
 TOT. NO. OF OBS RECS:       50
 TOT. NO. OF INDIVIDUALS:       50
 GENERAL NONLINEAR KINETICS MODEL (DVERK1, ADVAN6)
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 #TBLN:      1
 #METH: Laplacian Conditional Estimation
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
 #TERM:
0MINIMIZATION SUCCESSFUL
 NO. OF FUNCTION EVALUATIONS USED:       74
 NO. OF SIG. DIGITS IN FINAL EST.:  3.9

 ETABAR IS THE ARITHMETIC MEAN OF THE ETA-ESTIMATES,
 AND THE P-VALUE IS GIVEN FOR THE NULL HYPOTHESIS THAT THE TRUE MEAN IS 0.

 ETABAR:         0.0000E+00  0.0000E+00
 SE:             0.0000E+00  0.0000E+00
 N:                      50          50

 P VAL.:         1.0000E+00  1.0000E+00

 ETASHRINKSD(%)  1.0000E+02  1.0000E+02
 ETASHRINKVR(%)  1.0000E+02  1.0000E+02
 EBVSHRINKSD(%)  0.0000E+00  0.0000E+00
 EBVSHRINKVR(%)  0.0000E+00  0.0000E+00
 EPSSHRINKSD(%)  1.0000E+02
 EPSSHRINKVR(%)  1.0000E+02


 TOTAL DATA POINTS NORMALLY DISTRIBUTED (N):            0
 N*LOG(2PI) CONSTANT TO OBJECTIVE FUNCTION:    0.0000000000000000
 OBJECTIVE FUNCTION VALUE WITHOUT CONSTANT:    125.01789256599204
 OBJECTIVE FUNCTION VALUE WITH CONSTANT:       125.01789256599204
 REPORTED OBJECTIVE FUNCTION DOES NOT CONTAIN CONSTANT

 TOTAL EFFECTIVE ETAS (NIND*NETA):                             0


 #TERE:
 Elapsed estimation  time in seconds:     0.89
 Elapsed covariance  time in seconds:     0.23
 Elapsed postprocess time in seconds:     0.06

 ********************                         LAPLACIAN CONDITIONAL ESTIMATION                       ********************
 #OBJT:**************                       MINIMUM VALUE OF OBJECTIVE FUNCTION                      ********************
 #OBJV:********************************************      125.018       **************************************************

 ********************                         LAPLACIAN CONDITIONAL ESTIMATION                       ********************
 ********************                             FINAL PARAMETER ESTIMATE                           ********************

 THETA - VECTOR OF FIXED EFFECTS PARAMETERS   *********
         TH 1      TH 2      TH 3
         7.14E+00  2.28E-01  1.69E-02

 OMEGA - COV MATRIX FOR RANDOM EFFECTS - ETAS  ********
         ETA1      ETA2
 ETA1
+        0.00E+00
 ETA2
+        0.00E+00  0.00E+00

 OMEGA - CORR MATRIX FOR RANDOM EFFECTS - ETAS  *******
         ETA1      ETA2
 ETA1
+        0.00E+00
 ETA2
+        0.00E+00  0.00E+00

 ********************                         LAPLACIAN CONDITIONAL ESTIMATION                       ********************
 ********************                            STANDARD ERROR OF ESTIMATE                          ********************

 THETA - VECTOR OF FIXED EFFECTS PARAMETERS   *********
         TH 1      TH 2      TH 3
         1.59E-01  5.59E-02  2.96E-03

 OMEGA - COV MATRIX FOR RANDOM EFFECTS - ETAS  ********
         ETA1      ETA2
 ETA1
+       .........
 ETA2
+       ......... .........

 OMEGA - CORR MATRIX FOR RANDOM EFFECTS - ETAS  *******
         ETA1      ETA2
 ETA1
+       .........
 ETA2
+       ......... .........

 ********************                         LAPLACIAN CONDITIONAL ESTIMATION                       ********************
 ********************                          COVARIANCE MATRIX OF ESTIMATE                         ********************

            TH 1      TH 2      TH 3      OM11      OM12      OM22
 TH 1
+        2.51E-02
 TH 2
+        6.03E-03  3.12E-03
 TH 3
+       -1.20E-04 -1.37E-04  8.77E-06
 OM11
+       ......... ......... ......... .........
 OM12
+       ......... ......... ......... ......... .........
 OM22
+       ......... ......... ......... ......... ......... .........

 ********************                         LAPLACIAN CONDITIONAL ESTIMATION                       ********************
 ********************                          CORRELATION MATRIX OF ESTIMATE                        ********************

            TH 1      TH 2      TH 3      OM11      OM12      OM22
 TH 1
+        1.59E-01
 TH 2
+        6.81E-01  5.59E-02
 TH 3
+       -2.57E-01 -8.27E-01  2.96E-03
 OM11
+       ......... ......... ......... .........
 OM12
+       ......... ......... ......... ......... .........
 OM22
+       ......... ......... ......... ......... ......... .........
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 Elapsed finaloutput time in seconds:     0.01
 #CPUT: Total CPU Time in Seconds,        1.205
