Sat Jul 27 04:54:47 PM EDT 2024
$PROBLEM    PK. Test of multiple output table formats

;@ Variables 16/20 @;
$INPUT ID NOMTIME TIME EVID CMT AMT DV FLAG STUDY BLQ
CYCLE DOSE PART PROFDAY PROFTIME WEIGHTB EFF0

$DATA      xgxr4.csv IGNORE=@ IGNORE=(FLAG.NE.0)

$SUBROUTINE ADVAN4 TRANS4

$PK
KA=THETA(1)*EXP(ETA(1))
V2=THETA(2)*EXP(ETA(2))
CL=THETA(3)*EXP(ETA(3))
V3=THETA(4)*EXP(ETA(4))
Q=THETA(5)*EXP(ETA(5))

$ERROR
  IPRED=F
  IRES=DV-IPRED

  IF (IPRED.GT.1) THEN
    W = SQRT(IPRED**2*SIGMA(1,1)**2 + SIGMA(2,2)**2)
  ELSE
    W=1
  ENDIF

  IWRES=IRES/W
  Y=F+F*ERR(1)+ERR(2)

;-----------------------INITIAL ESTIMATES---------------------------------
$THETA  (0,0.9)           ; POPKA
$THETA  (0,4.2)             ; POPCL
$THETA  (0,3.6)             ; POPV2
$THETA  (0,5.81)             ; POPV3
$THETA  (0,3.44)           ; POPQ

$OMEGA 0.1
$OMEGA 0.1
$OMEGA 0.1
$OMEGA 0 FIX
$OMEGA 0 FIX

$SIGMA .2
$SIGMA .2

$ESTIMATION METHOD=1 POSTHOC INTER MAXEVAL=9999 NSIG=2 SIGL=9
            PRINT=10 NOABORT

;@ Pred Variables 8/20 @;
$TABLE KA  Q  FILE=xgxr018_res.txt

$TABLE ID V2 V3 FORMAT=tF13.4 FILE=xgxr018_res_vols.txt

$TABLE ID        CL        FIRSTONLY  FORMAT=,1PE15.8  FILE=xgxr018_res_fo.txt
       NOPRINT   NOAPPEND  ONEHEADER

NM-TRAN MESSAGES
 WARNINGS AND ERRORS (IF ANY) FOR PROBLEM    1
 (WARNING  2) NM-TRAN INFERS THAT THE DATA ARE POPULATION.
 (WARNING  23) $PK DOES NOT DEFINE A SCALE PARAMETER FOR THE CENTRAL
 COMPARTMENT.  WITH THIS TRANS, IT MAY NOT BE POSSIBLE TO SEPARATELY
 OBTAIN ESTIMATES OF PARAMETERS AFFECTING CLEARANCE AND VOLUME.
 (WARNING  79) SIGMA IS USED ON THE RIGHT. WITH A SUBSEQUENT RUN, IF AN
 INITIAL ESTIMATE OF A DIAGONAL BLOCK OF SIGMA IS TO BE COMPUTED BY
 NONMEM, THAT BLOCK WILL BE SET TO AN IDENTITY MATRIX DURING THAT
 COMPUTATION. THIS COULD LEAD TO AN ARITHMETIC EXCEPTION.*
 * THE MAXIMUM NUMBER OF WARNINGS OF ONE OR MORE TYPES WAS REACHED.
 IT IS POSSIBLE THAT SOME WARNING MESSAGES WERE SUPPRESSED.
Note: Analytical 2nd Derivatives are constructed in FSUBS but are never used.
      You may insert $ABBR DERIV2=NO after the first $PROB to save FSUBS construction and compilation time

1NONLINEAR MIXED EFFECTS MODEL PROGRAM (NONMEM) VERSION 7.5.1
 ORIGINALLY DEVELOPED BY STUART BEAL, LEWIS SHEINER, AND ALISON BOECKMANN
 CURRENT DEVELOPERS ARE ROBERT BAUER, ICON DEVELOPMENT SOLUTIONS,
 AND ALISON BOECKMANN. IMPLEMENTATION, EFFICIENCY, AND STANDARDIZATION
 PERFORMED BY NOUS INFOSYSTEMS.
 PROBLEM NO.:         1
 PK. Test of multiple output table formats
 TOT. NO. OF OBS RECS:      755
 TOT. NO. OF INDIVIDUALS:      150
 TWO COMPARTMENT MODEL WITH FIRST-ORDER ABSORPTION (ADVAN4)
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 #TBLN:      1
 #METH: First Order Conditional Estimation with Interaction
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
 #TERM:
0MINIMIZATION SUCCESSFUL
 NO. OF FUNCTION EVALUATIONS USED:      454
 NO. OF SIG. DIGITS IN FINAL EST.:  2.1
0PARAMETER ESTIMATE IS NEAR ITS BOUNDARY
 THIS MUST BE ADDRESSED BEFORE THE COVARIANCE STEP CAN BE IMPLEMENTED

 ETABAR IS THE ARITHMETIC MEAN OF THE ETA-ESTIMATES,
 AND THE P-VALUE IS GIVEN FOR THE NULL HYPOTHESIS THAT THE TRUE MEAN IS 0.

 ETABAR:         1.0063E-02  6.9481E-03 -1.5906E-05  0.0000E+00  0.0000E+00
 SE:             3.2599E-02  2.3965E-02  4.7284E-05  0.0000E+00  0.0000E+00
 N:                     131         131         131         131         131

 P VAL.:         7.5754E-01  7.7188E-01  7.3657E-01  1.0000E+00  1.0000E+00

 ETASHRINKSD(%)  1.8606E+01  2.1300E+01  9.6321E+01  0.0000E+00  0.0000E+00
 ETASHRINKVR(%)  3.3750E+01  3.8063E+01  9.9865E+01  0.0000E+00  0.0000E+00
 EBVSHRINKSD(%)  1.9011E+01  2.1435E+01  9.6243E+01  0.0000E+00  0.0000E+00
 EBVSHRINKVR(%)  3.4409E+01  3.8276E+01  9.9859E+01  0.0000E+00  0.0000E+00
 RELATIVEINF(%)  5.6894E+01  1.5090E+01  3.6830E-02  0.0000E+00  0.0000E+00
 EPSSHRINKSD(%)  1.0792E+01  1.0792E+01
 EPSSHRINKVR(%)  2.0419E+01  2.0419E+01


 TOTAL DATA POINTS NORMALLY DISTRIBUTED (N):          755
 N*LOG(2PI) CONSTANT TO OBJECTIVE FUNCTION:    1387.5971851390557
 OBJECTIVE FUNCTION VALUE WITHOUT CONSTANT:   -1951.5378563425709
 OBJECTIVE FUNCTION VALUE WITH CONSTANT:      -563.94067120351519
 REPORTED OBJECTIVE FUNCTION DOES NOT CONTAIN CONSTANT

 TOTAL EFFECTIVE ETAS (NIND*NETA):                           393


 #TERE:
 Elapsed estimation  time in seconds:     5.40
 Elapsed postprocess time in seconds:     0.04

 ********************               FIRST ORDER CONDITIONAL ESTIMATION WITH INTERACTION              ********************
 #OBJT:**************                       MINIMUM VALUE OF OBJECTIVE FUNCTION                      ********************
 #OBJV:********************************************    -1951.538       **************************************************

 ********************               FIRST ORDER CONDITIONAL ESTIMATION WITH INTERACTION              ********************
 ********************                             FINAL PARAMETER ESTIMATE                           ********************

 THETA - VECTOR OF FIXED EFFECTS PARAMETERS   *********
         TH 1      TH 2      TH 3      TH 4      TH 5
         1.81E-01  4.20E-02  7.25E-01  1.79E-01  1.07E+04

 OMEGA - COV MATRIX FOR RANDOM EFFECTS - ETAS  ********
         ETA1      ETA2      ETA3      ETA4      ETA5
 ETA1
+        2.10E-01
 ETA2
+        0.00E+00  1.21E-01
 ETA3
+        0.00E+00  0.00E+00  2.16E-04
 ETA4
+        0.00E+00  0.00E+00  0.00E+00  0.00E+00
 ETA5
+        0.00E+00  0.00E+00  0.00E+00  0.00E+00  0.00E+00

 SIGMA - COV MATRIX FOR RANDOM EFFECTS - EPSILONS  ****
         EPS1      EPS2
 EPS1
+        1.06E-01
 EPS2
+        0.00E+00  1.40E-03

 OMEGA - CORR MATRIX FOR RANDOM EFFECTS - ETAS  *******
         ETA1      ETA2      ETA3      ETA4      ETA5
 ETA1
+        4.58E-01
 ETA2
+        0.00E+00  3.49E-01
 ETA3
+        0.00E+00  0.00E+00  1.47E-02
 ETA4
+        0.00E+00  0.00E+00  0.00E+00  0.00E+00
 ETA5
+        0.00E+00  0.00E+00  0.00E+00  0.00E+00  0.00E+00

 SIGMA - CORR MATRIX FOR RANDOM EFFECTS - EPSILONS  ***
         EPS1      EPS2
 EPS1
+        3.25E-01
 EPS2
+        0.00E+00  3.74E-02
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 Elapsed finaloutput time in seconds:     0.07
 #CPUT: Total CPU Time in Seconds,        5.653
