Sat Nov  4 05:15:38 PM EDT 2023
$PROBLEM    PK. With ignore statement.
;@ Variables 17/20 @;
$INPUT      ROW ID NOMTIME TIME EVID CMT AMT DV FLAG STUDY BLQ CYCLE
            DOSE PART PROFDAY PROFTIME WEIGHTB eff0
$DATA      xgxr1.csv IGNORE=@ IGNORE=(FLAG.NE.0) IGNORE=(DOSE.LE.10)
$SUBROUTINE ADVAN4 TRANS4
$PK
KA=THETA(1)*EXP(ETA(1))
V2=THETA(2)*EXP(ETA(2))
CL=THETA(3)*EXP(ETA(3))
V3=THETA(4)*EXP(ETA(4))
Q=THETA(5)*EXP(ETA(5))

$ERROR
  IPRED=F
  IRES=DV-IPRED

  IF (IPRED.GT.1) THEN
    W = SQRT(IPRED**2*SIGMA(1,1)**2 + SIGMA(2,2)**2)
  ELSE
    W=1
  ENDIF

  IWRES=IRES/W
  Y=F+F*ERR(1)+ERR(2)

;-----------------------INITIAL ESTIMATES---------------------------------
$THETA  (0,0.9) ; POPKA
$THETA  (0,4.2) ; POPCL
$THETA  (0,3.6) ; POPV2
$THETA  (0,5.81) ; POPV3
$THETA  (0,3.44) ; POPQ
$OMEGA  0.1
$OMEGA  0.1
$OMEGA  0.1
$OMEGA  0  FIX
$OMEGA  0  FIX
$SIGMA  .2
$SIGMA  .2
$ESTIMATION METHOD=1 POSTHOC INTER MAXEVAL=9999 NSIG=2 SIGL=9 PRINT=10
            NOABORT
$TABLE      KA V2 CL V3 Q IPRED DV FILE=xgxr004_res.txt

NM-TRAN MESSAGES
 WARNINGS AND ERRORS (IF ANY) FOR PROBLEM    1
 (WARNING  2) NM-TRAN INFERS THAT THE DATA ARE POPULATION.
 (WARNING  23) $PK DOES NOT DEFINE A SCALE PARAMETER FOR THE CENTRAL
 COMPARTMENT.  WITH THIS TRANS, IT MAY NOT BE POSSIBLE TO SEPARATELY
 OBTAIN ESTIMATES OF PARAMETERS AFFECTING CLEARANCE AND VOLUME.
 (WARNING  79) SIGMA IS USED ON THE RIGHT. WITH A SUBSEQUENT RUN, IF AN
 INITIAL ESTIMATE OF A DIAGONAL BLOCK OF SIGMA IS TO BE COMPUTED BY
 NONMEM, THAT BLOCK WILL BE SET TO AN IDENTITY MATRIX DURING THAT
 COMPUTATION. THIS COULD LEAD TO AN ARITHMETIC EXCEPTION.*
 * THE MAXIMUM NUMBER OF WARNINGS OF ONE OR MORE TYPES WAS REACHED.
 IT IS POSSIBLE THAT SOME WARNING MESSAGES WERE SUPPRESSED.
Note: Analytical 2nd Derivatives are constructed in FSUBS but are never used.
      You may insert $ABBR DERIV2=NO after the first $PROB to save FSUBS construction and compilation time

1NONLINEAR MIXED EFFECTS MODEL PROGRAM (NONMEM) VERSION 7.5.1
 ORIGINALLY DEVELOPED BY STUART BEAL, LEWIS SHEINER, AND ALISON BOECKMANN
 CURRENT DEVELOPERS ARE ROBERT BAUER, ICON DEVELOPMENT SOLUTIONS,
 AND ALISON BOECKMANN. IMPLEMENTATION, EFFICIENCY, AND STANDARDIZATION
 PERFORMED BY NOUS INFOSYSTEMS.
 PROBLEM NO.:         1
 PK. With ignore statement.
 TOT. NO. OF OBS RECS:      641
 TOT. NO. OF INDIVIDUALS:       90
 TWO COMPARTMENT MODEL WITH FIRST-ORDER ABSORPTION (ADVAN4)
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 #TBLN:      1
 #METH: First Order Conditional Estimation with Interaction
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
 #TERM:
0MINIMIZATION TERMINATED
 DUE TO ROUNDING ERRORS (ERROR=134)
 NO. OF FUNCTION EVALUATIONS USED:      530
 NO. OF SIG. DIGITS UNREPORTABLE
0PARAMETER ESTIMATE IS NEAR ITS BOUNDARY

 ETABAR IS THE ARITHMETIC MEAN OF THE ETA-ESTIMATES,
 AND THE P-VALUE IS GIVEN FOR THE NULL HYPOTHESIS THAT THE TRUE MEAN IS 0.

 ETABAR:         5.8531E-03  6.8271E-03 -6.8894E-07  0.0000E+00  0.0000E+00
 SE:             4.8604E-02  3.4109E-02  2.8695E-06  0.0000E+00  0.0000E+00
 N:                      90          90          90          90          90

 P VAL.:         9.0415E-01  8.4136E-01  8.1026E-01  1.0000E+00  1.0000E+00

 ETASHRINKSD(%)  1.0445E+01  1.3114E+01  9.9139E+01  0.0000E+00  0.0000E+00
 ETASHRINKVR(%)  1.9799E+01  2.4509E+01  9.9993E+01  0.0000E+00  0.0000E+00
 EBVSHRINKSD(%)  1.0192E+01  1.2652E+01  9.9121E+01  0.0000E+00  0.0000E+00
 EBVSHRINKVR(%)  1.9345E+01  2.3704E+01  9.9992E+01  0.0000E+00  0.0000E+00
 RELATIVEINF(%)  7.3756E+01  2.2940E+01  2.3955E-03  0.0000E+00  0.0000E+00
 EPSSHRINKSD(%)  1.0800E+01  1.0800E+01
 EPSSHRINKVR(%)  2.0433E+01  2.0433E+01


 TOTAL DATA POINTS NORMALLY DISTRIBUTED (N):          641
 N*LOG(2PI) CONSTANT TO OBJECTIVE FUNCTION:    1178.0791995683903
 OBJECTIVE FUNCTION VALUE WITHOUT CONSTANT:   -1356.0658475872203
 OBJECTIVE FUNCTION VALUE WITH CONSTANT:      -177.98664801883001
 REPORTED OBJECTIVE FUNCTION DOES NOT CONTAIN CONSTANT

 TOTAL EFFECTIVE ETAS (NIND*NETA):                           270


 #TERE:
 Elapsed estimation  time in seconds:     3.37
 Elapsed postprocess time in seconds:     0.03

 ********************               FIRST ORDER CONDITIONAL ESTIMATION WITH INTERACTION              ********************
 #OBJT:**************                       MINIMUM VALUE OF OBJECTIVE FUNCTION                      ********************
 #OBJV:********************************************    -1356.066       **************************************************

 ********************               FIRST ORDER CONDITIONAL ESTIMATION WITH INTERACTION              ********************
 ********************                             FINAL PARAMETER ESTIMATE                           ********************

 THETA - VECTOR OF FIXED EFFECTS PARAMETERS   *********
         TH 1      TH 2      TH 3      TH 4      TH 5
         1.93E-01  4.20E-02  7.84E-01  2.08E-01  1.45E+06

 OMEGA - COV MATRIX FOR RANDOM EFFECTS - ETAS  ********
         ETA1      ETA2      ETA3      ETA4      ETA5
 ETA1
+        2.65E-01
 ETA2
+        0.00E+00  1.39E-01
 ETA3
+        0.00E+00  0.00E+00  1.00E-05
 ETA4
+        0.00E+00  0.00E+00  0.00E+00  0.00E+00
 ETA5
+        0.00E+00  0.00E+00  0.00E+00  0.00E+00  0.00E+00

 SIGMA - COV MATRIX FOR RANDOM EFFECTS - EPSILONS  ****
         EPS1      EPS2
 EPS1
+        9.30E-02
 EPS2
+        0.00E+00  3.02E-03

 OMEGA - CORR MATRIX FOR RANDOM EFFECTS - ETAS  *******
         ETA1      ETA2      ETA3      ETA4      ETA5
 ETA1
+        5.15E-01
 ETA2
+        0.00E+00  3.72E-01
 ETA3
+        0.00E+00  0.00E+00  3.16E-03
 ETA4
+        0.00E+00  0.00E+00  0.00E+00  0.00E+00
 ETA5
+        0.00E+00  0.00E+00  0.00E+00  0.00E+00  0.00E+00

 SIGMA - CORR MATRIX FOR RANDOM EFFECTS - EPSILONS  ***
         EPS1      EPS2
 EPS1
+        3.05E-01
 EPS2
+        0.00E+00  5.50E-02
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 Elapsed finaloutput time in seconds:     0.02
 #CPUT: Total CPU Time in Seconds,        3.491
