Sat Nov  4 08:33:10 PM EDT 2023
$PROBLEM    014 with TABLE options NOHEADER ONEHEADER NOLABEL
$INPUT      ROW ID NOMTIME TIME EVID CMT AMT DV FLAG STUDY BLQ CYCLE
            DOSE PART PROFDAY PROFTIME WEIGHTB eff0
$DATA      xgxr2.csv IGNORE=@ IGNORE=(FLAG.NE.0)
$SUBROUTINE ADVAN2 TRANS2
$PK
TVKA=THETA(1)
TVV=THETA(2)
TVCL=THETA(3)

KA=TVKA*EXP(ETA(1))
V=TVV*EXP(ETA(2))
CL=TVCL*EXP(ETA(3))

$ERROR
  IPRED=F
  IRES=DV-IPRED

  IF (IPRED.GT.1) THEN
    W = SQRT(IPRED**2*SIGMA(1,1)**2 + SIGMA(2,2)**2)
  ELSE
    W=1
  ENDIF

  IWRES=IRES/W
  Y=F+F*ERR(1)+ERR(2)

;-----------------------INITIAL ESTIMATES---------------------------------
$THETA  (0,0.9) ; POPKA
$THETA  (0,4.2) ; POPCL
$THETA  (0,3.6) ; POPV2
$OMEGA  0.1
$OMEGA  0.1
$OMEGA  0.1
$SIGMA  .2
$SIGMA  .2
$ESTIMATION METHOD=1 POSTHOC INTER MAXEVAL=9999 NSIG=2 SIGL=9 PRINT=10
            NOABORT
$TABLE      ROW TVKA TVV NOPRINT NOHEADER FILE=xgxr033_res_a.txt
$TABLE      ROW IPRED NOPRINT ONEHEADER FILE=xgxr033_res_c.txt
$TABLE      ROW IPRED NOPRINT NOLABEL FILE=xgxr033_res_d.txt

NM-TRAN MESSAGES
 WARNINGS AND ERRORS (IF ANY) FOR PROBLEM    1
 (WARNING  2) NM-TRAN INFERS THAT THE DATA ARE POPULATION.
 (WARNING  23) $PK DOES NOT DEFINE A SCALE PARAMETER FOR THE CENTRAL
 COMPARTMENT.  WITH THIS TRANS, IT MAY NOT BE POSSIBLE TO SEPARATELY
 OBTAIN ESTIMATES OF PARAMETERS AFFECTING CLEARANCE AND VOLUME.
 (WARNING  79) SIGMA IS USED ON THE RIGHT. WITH A SUBSEQUENT RUN, IF AN
 INITIAL ESTIMATE OF A DIAGONAL BLOCK OF SIGMA IS TO BE COMPUTED BY
 NONMEM, THAT BLOCK WILL BE SET TO AN IDENTITY MATRIX DURING THAT
 COMPUTATION. THIS COULD LEAD TO AN ARITHMETIC EXCEPTION.*
 * THE MAXIMUM NUMBER OF WARNINGS OF ONE OR MORE TYPES WAS REACHED.
 IT IS POSSIBLE THAT SOME WARNING MESSAGES WERE SUPPRESSED.
Note: Analytical 2nd Derivatives are constructed in FSUBS but are never used.
      You may insert $ABBR DERIV2=NO after the first $PROB to save FSUBS construction and compilation time

1NONLINEAR MIXED EFFECTS MODEL PROGRAM (NONMEM) VERSION 7.5.1
 ORIGINALLY DEVELOPED BY STUART BEAL, LEWIS SHEINER, AND ALISON BOECKMANN
 CURRENT DEVELOPERS ARE ROBERT BAUER, ICON DEVELOPMENT SOLUTIONS,
 AND ALISON BOECKMANN. IMPLEMENTATION, EFFICIENCY, AND STANDARDIZATION
 PERFORMED BY NOUS INFOSYSTEMS.
 PROBLEM NO.:         1
 014 with TABLE options NOHEADER ONEHEADER NOLABEL
 TOT. NO. OF OBS RECS:      755
 TOT. NO. OF INDIVIDUALS:      150
 ONE COMPARTMENT MODEL WITH FIRST-ORDER ABSORPTION (ADVAN2)
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 #TBLN:      1
 #METH: First Order Conditional Estimation with Interaction
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
 #TERM:
0MINIMIZATION SUCCESSFUL
 NO. OF FUNCTION EVALUATIONS USED:      218
 NO. OF SIG. DIGITS IN FINAL EST.:  3.1

 ETABAR IS THE ARITHMETIC MEAN OF THE ETA-ESTIMATES,
 AND THE P-VALUE IS GIVEN FOR THE NULL HYPOTHESIS THAT THE TRUE MEAN IS 0.

 ETABAR:         4.9155E-03  6.3202E-04 -1.1755E-03
 SE:             1.7293E-02  5.9222E-03  1.1014E-02
 N:                     131         131         131

 P VAL.:         7.7623E-01  9.1501E-01  9.1501E-01

 ETASHRINKSD(%)  2.9229E+01  5.5965E+01  3.9947E+01
 ETASHRINKVR(%)  4.9915E+01  8.0609E+01  6.3936E+01
 EBVSHRINKSD(%)  2.9143E+01  5.6279E+01  4.0375E+01
 EBVSHRINKVR(%)  4.9793E+01  8.0885E+01  6.4449E+01
 RELATIVEINF(%)  4.3907E+01  1.0000E-10  1.0000E-10
 EPSSHRINKSD(%)  7.2856E+00  7.2856E+00
 EPSSHRINKVR(%)  1.4040E+01  1.4040E+01


 TOTAL DATA POINTS NORMALLY DISTRIBUTED (N):          755
 N*LOG(2PI) CONSTANT TO OBJECTIVE FUNCTION:    1387.5971851390557
 OBJECTIVE FUNCTION VALUE WITHOUT CONSTANT:   -1726.7488982473369
 OBJECTIVE FUNCTION VALUE WITH CONSTANT:      -339.15171310828123
 REPORTED OBJECTIVE FUNCTION DOES NOT CONTAIN CONSTANT

 TOTAL EFFECTIVE ETAS (NIND*NETA):                           393


 #TERE:
 Elapsed estimation  time in seconds:     1.34
 Elapsed postprocess time in seconds:     0.02

 ********************               FIRST ORDER CONDITIONAL ESTIMATION WITH INTERACTION              ********************
 #OBJT:**************                       MINIMUM VALUE OF OBJECTIVE FUNCTION                      ********************
 #OBJV:********************************************    -1726.749       **************************************************

 ********************               FIRST ORDER CONDITIONAL ESTIMATION WITH INTERACTION              ********************
 ********************                             FINAL PARAMETER ESTIMATE                           ********************

 THETA - VECTOR OF FIXED EFFECTS PARAMETERS   *********
         TH 1      TH 2      TH 3
         1.27E-01  4.27E-02  6.26E-01

 OMEGA - COV MATRIX FOR RANDOM EFFECTS - ETAS  ********
         ETA1      ETA2      ETA3
 ETA1
+        7.82E-02
 ETA2
+        0.00E+00  2.37E-02
 ETA3
+        0.00E+00  0.00E+00  4.41E-02

 SIGMA - COV MATRIX FOR RANDOM EFFECTS - EPSILONS  ****
         EPS1      EPS2
 EPS1
+        2.00E-01
 EPS2
+        0.00E+00  4.04E-04

 OMEGA - CORR MATRIX FOR RANDOM EFFECTS - ETAS  *******
         ETA1      ETA2      ETA3
 ETA1
+        2.80E-01
 ETA2
+        0.00E+00  1.54E-01
 ETA3
+        0.00E+00  0.00E+00  2.10E-01

 SIGMA - CORR MATRIX FOR RANDOM EFFECTS - EPSILONS  ***
         EPS1      EPS2
 EPS1
+        4.47E-01
 EPS2
+        0.00E+00  2.01E-02
 Elapsed finaloutput time in seconds:     0.04
 #CPUT: Total CPU Time in Seconds,        1.488
